// COMSOL Multiphysics 6.2.0.339 model "diffusion1d_works.mph"
// Outline of the model tree

Functions
  an1: Analytic | funcname = templ; expr = exp(-x^2)
  an2: Analytic | funcname = dtemplx; expr = -2*x*exp(-x^2)

Couplings
  intop1: Integration on domains 1

Geometry
  geom1 "Geometry 1" (1D, length unit m)
    i1: Interval | coord = {-8, 8}
    fin: Finalize "Form Union"

Physics
  g: GeneralFormPDE on all domains
    dependent variable u
    EquationForm.form = Automatic
    gfeq1: GeneralFormPDE (default) | f = -G*u+C*x*ux; Ga = -ux; da = 1
    zflx1: ZeroFluxBoundary "Zero Flux 1" (default)
    init1: init "Initial Values 1" (default) | u = 0.5*(tanh((x+1)/0.2)-tanh((x-1)/0.2))
  ge: GlobalEquations "Global ODEs and DAEs"
    EquationForm.form = Automatic
    ge1: GlobalEquations
      name = {G, C}
      equation = {intop1((u-templ(x))*templ(x)), intop1((u-templ(x))*x*dtemplx(x))}
      initialValueU = {0, 0}
      initialValueUt = {0, 0}
      description = {, }
      valueType = complex
      fieldName = ODE1
      DependentVariableQuantity = dimensionless
      CustomDependentVariableUnit = m
      SourceTermQuantity = dimensionless
      CustomSourceTermUnit = m

Mesh
  mesh1 "Mesh 1"
    size: MeshSizeDefault | hmax = 16/101; hgrad = 1
    edg1: Edge on remaining entities

Studies
  std1 "Study 1"
    time: Transient "Time Dependent" | tlist = range(0,0.01,5); usertol = on; rtol = 0.001

Solver configurations
  sol1 "Solution 1" (study std1)
    v1: Variables "Dependent Variables 1"
    t1: Time "Time-Dependent Solver 1"
      tlist = range(0,0.01,5)
      tstepsbdf = strict
      maxorder = 1
      bdforder = 1
      eventtol = 0.001
      dDef: Direct
      fc1: FullyCoupled | linsolver = dDef

Datasets
  dset1: Solution | solution = sol1

Derived values
  gev1: EvalGlobal "Global Evaluation 1"
    data = dset1
    table = tbl2
    expr = {G, C}
    descr = {State variable G, State variable C}
  gev2: EvalGlobal "Global Evaluation 2" | data = dset1; table = tbl1; expr = {G, C}

Tables
  tbl2: Table
    // Global Evaluation 1
    Time (s) | State variable G (1) | State variable C (1)
    0 | -1.46145 | 0.922895
    0.01 | -1.51435 | 1.0287
    0.02 | -1.56271 | 1.1254
    0.03 | -1.60695 | 1.21389
    0.04 | -1.64699 | 1.29397
    0.05 | -1.68324 | 1.36646
    0.06 | -1.71596 | 1.4319
    0.07 | -1.74535 | 1.49069
    0.08 | -1.77143 | 1.54285
    0.09 | -1.79484 | 1.58965
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
Plots
  pg1: PlotGroup1D "General Form PDE" | data = dset1
    lngr1: LineGraph on domains 1 | expr = u; xdata = expr; xdataexpr = x
  pg2: PlotGroup1D "1D Plot Group 2" | data = dset1
    glob1: Global | expr = {G, C}; descr = {State variable G, State variable C}
  pg3: PlotGroup1D "1D Plot Group 3" | data = none
    tblp1: Table "Table Graph 1" | table = tbl1
  pg4: PlotGroup1D "1D Plot Group 4" | data = none
    tblp1: Table "Table Graph 1" | table = tbl2