// COMSOL Multiphysics 6.2.0.339 model "diffusion2d_works.mph"
// Outline of the model tree

Functions
  an1: Analytic | funcname = templ; expr = exp(-(x+y)); args = {x, y}
  an2: Analytic | funcname = dtemplx; expr = -exp(-(x+y)); args = {x, y}
  an3: Analytic | funcname = dtemply; expr = -exp(-(x+y)); args = {x, y}

Couplings
  intop1: Integration on domains 1

Geometry
  geom1 "Geometry 1" (2D, length unit m)
    sq1: Square | size = 4
    fin: Finalize "Form Union"

Physics
  g: GeneralFormPDE on all domains
    dependent variable u
    EquationForm.form = Automatic
    gfeq1: GeneralFormPDE (default) | f = -G*u+C*(x*ux+y*uy); Ga = {-ux, -uy}; da = 1
    zflx1: ZeroFluxBoundary "Zero Flux 1" (default)
    init1: init "Initial Values 1" (default) | u = templ(x,y)
    dir1: DirichletBoundary "Dirichlet Boundary Condition 1" on boundaries 3, 4 | r = 0
  ge: GlobalEquations "Global ODEs and DAEs"
    EquationForm.form = Automatic
    ge1: GlobalEquations
      name = {G, C}
      equation = {intop1((u-templ(x,y))*templ(x,y)), intop1((u-templ(x,y))*(x*dtemplx(x,y)+y*dtemply(x,y)))}
      initialValueU = {0, 0}
      initialValueUt = {0, 0}
      description = {, }
      valueType = complex
      fieldName = ODE1
      DependentVariableQuantity = dimensionless
      CustomDependentVariableUnit = m
      SourceTermQuantity = dimensionless
      CustomSourceTermUnit = m

Mesh
  mesh1 "Mesh 1"
    size: MeshSizeDefault | hmax = 0.268; hmin = 0.0012; hcurve = 0.3; hgrad = 1.3
    ftri1: FreeTri "Free Triangular 1" (disabled) on remaining entities | smoothmaxiter = 4; smoothmaxdepth = 4
    map1: Map "Mapped 1" on remaining entities
      dis1: Distribution on boundaries 1, 4 | numelem = 20; equidistant = on
      dis2: Distribution on boundaries 2, 3 | numelem = 20; equidistant = on

Studies
  std1 "Study 1"
    time: Transient "Time Dependent" | tlist = range(0,0.1,6); usertol = on; rtol = 0.0001

Solver configurations
  sol1 "Solution 1" (study std1)
    v1: Variables "Dependent Variables 1"
    t1: Time "Time-Dependent Solver 1" | tlist = range(0,0.1,6); tstepsbdf = strict; maxorder = 1; eventtol = 0.001
      dDef: Direct
      fc1: FullyCoupled | linsolver = dDef

Datasets
  dset1: Solution | solution = sol1

Derived values
  gev1: EvalGlobal "Global Evaluation 1" | data = dset1; table = tbl2; expr = {G/C, }
  gev2: EvalGlobal "Global Evaluation 2" | data = dset1; table = tbl1; expr = {G/C, }

Tables
  tbl2: Table
    // Global Evaluation 1
    Time (s) | G/C (1)
    0 | -1.52702
    0.1 | -1.77034
    0.2 | -1.86516
    0.3 | -1.92081
    0.4 | -1.95428
    0.5 | -1.9739
    0.6 | -1.98521
    0.7 | -1.99166
    0.8 | -1.99535
    0.9 | -1.99745
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
Plots
  pg1: PlotGroup2D "General Form PDE" | data = dset1
    surf1: Surface | expr = u
  pg2: PlotGroup1D "1D Plot Group 2" | data = dset1
    glob1: Global | expr = {G, C}; descr = {State variable G, State variable C}
  pg3: PlotGroup1D "1D Plot Group 3" | data = none
    tblp1: Table "Table Graph 1" | table = tbl1
  pg4: PlotGroup1D "1D Plot Group 4" | data = none
    tblp1: Table "Table Graph 1" | table = tbl2